Wed Jan  5 08:50:33 UTC 2022
$PROBLEM TWO COMPARTMENT ORAL

$DATA pk_oral2_30_90.csv IGNORE=#

$INPUT ID TIME	AMT	DV	MDV

$SUBROUTINE ADVAN4 TRANS4
$PK
  CL = THETA(1) * EXP(ETA(1))
  V2 = THETA(2) * EXP(ETA(2))
  V3 = THETA(3) * EXP(ETA(3))
  Q = THETA(4) * EXP(ETA(4))
  KA = THETA(5) * EXP(ETA(5))

  KE = CL/V2
  K12 = Q/V2
  K21 = Q/V3

$ERROR
  IPRED = F
  W = SQRT(THETA(6)**2 + THETA(7)**2 * IPRED**2)
  IRES = DV - IPRED
  IWRES = IRES / W
  Y = IPRED + W * EPS(1)

$THETA
  (0, 2.3 , 30)
  (0, 2.2, 100)
  (0, 2.4, 300)
  (0, 2.7, 20)
  (0, 2.13, 5)
  0.001 FIX
  (0, 0.3, 1)

$OMEGA
  0 FIX
$OMEGA BLOCK(2)
0.16
0.01 0.25
$OMEGA
  0 FIX
  0 FIX

$SIGMA
  1 FIX


;$ESTIMATION METHOD=0 POSTHOC MAXEVAL=9999 PRINT=5
$ESTIMATION NOABORT MAXEVAL=9999 METHOD=1 INTER PRINT=10 SIGDIGITS=3

$COVARIANCE PRINT=E

$TABLE ID TIME IPRED IWRES DV NOPRINT ONEHEADER FILE=sdtab4401
$TABLE ID CL V2 Q V3 KA NOPRINT ONEHEADER FILE=patab4401

NM-TRAN MESSAGES
 WARNINGS AND ERRORS (IF ANY) FOR PROBLEM    1
 (WARNING  2) NM-TRAN INFERS THAT THE DATA ARE POPULATION.
 (WARNING  23) $PK DOES NOT DEFINE A SCALE PARAMETER FOR THE CENTRAL
 COMPARTMENT.  WITH THIS TRANS, IT MAY NOT BE POSSIBLE TO SEPARATELY
 OBTAIN ESTIMATES OF PARAMETERS AFFECTING CLEARANCE AND VOLUME.

1NONLINEAR MIXED EFFECTS MODEL PROGRAM (NONMEM) VERSION 7.5.0
 ORIGINALLY DEVELOPED BY STUART BEAL, LEWIS SHEINER, AND ALISON BOECKMANN
 CURRENT DEVELOPERS ARE ROBERT BAUER, ICON DEVELOPMENT SOLUTIONS,
 AND ALISON BOECKMANN. IMPLEMENTATION, EFFICIENCY, AND STANDARDIZATION
 PERFORMED BY NOUS INFOSYSTEMS.
 PROBLEM NO.:         1
 TWO COMPARTMENT ORAL
 TOT. NO. OF OBS RECS:       49
 TOT. NO. OF INDIVIDUALS:        6
 TWO COMPARTMENT MODEL WITH FIRST-ORDER ABSORPTION (ADVAN4)
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 #TBLN:      1
 #METH: First Order Conditional Estimation with Interaction
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
 #TERM:
0MINIMIZATION SUCCESSFUL
 NO. OF FUNCTION EVALUATIONS USED:      696
 NO. OF SIG. DIGITS IN FINAL EST.:  3.4
0PARAMETER ESTIMATE IS NEAR ITS BOUNDARY
 THIS MUST BE ADDRESSED BEFORE THE COVARIANCE STEP CAN BE IMPLEMENTED

 ETABAR IS THE ARITHMETIC MEAN OF THE ETA-ESTIMATES,
 AND THE P-VALUE IS GIVEN FOR THE NULL HYPOTHESIS THAT THE TRUE MEAN IS 0.

 ETABAR:         0.0000E+00 -1.5333E-04 -4.1654E-02  0.0000E+00  0.0000E+00
 SE:             0.0000E+00  1.3234E-03  3.5952E-01  0.0000E+00  0.0000E+00
 N:                       6           6           6           6           6

 P VAL.:         1.0000E+00  9.0776E-01  9.0776E-01  1.0000E+00  1.0000E+00

 ETASHRINKSD(%)  0.0000E+00  1.1226E+01  1.1225E+01  0.0000E+00  0.0000E+00
 ETASHRINKVR(%)  0.0000E+00  2.1191E+01  2.1189E+01  0.0000E+00  0.0000E+00
 EBVSHRINKSD(%)  0.0000E+00  1.8632E+01  1.8632E+01  0.0000E+00  0.0000E+00
 EBVSHRINKVR(%)  0.0000E+00  3.3793E+01  3.3792E+01  0.0000E+00  0.0000E+00
 RELATIVEINF(%)  0.0000E+00  4.4060E-06  1.0000E-10  0.0000E+00  0.0000E+00
 EPSSHRINKSD(%)  1.7418E+00
 EPSSHRINKVR(%)  3.4533E+00


 TOTAL DATA POINTS NORMALLY DISTRIBUTED (N):           49
 N*LOG(2PI) CONSTANT TO OBJECTIVE FUNCTION:    90.055976254057924
 OBJECTIVE FUNCTION VALUE WITHOUT CONSTANT:    796.32140039273077
 OBJECTIVE FUNCTION VALUE WITH CONSTANT:       886.37737664678866
 REPORTED OBJECTIVE FUNCTION DOES NOT CONTAIN CONSTANT

 TOTAL EFFECTIVE ETAS (NIND*NETA):                            12


 #TERE:
 Elapsed estimation  time in seconds:     0.69
 Elapsed postprocess time in seconds:     0.02

 ********************               FIRST ORDER CONDITIONAL ESTIMATION WITH INTERACTION              ********************
 #OBJT:**************                       MINIMUM VALUE OF OBJECTIVE FUNCTION                      ********************
 #OBJV:********************************************      796.321       **************************************************

 ********************               FIRST ORDER CONDITIONAL ESTIMATION WITH INTERACTION              ********************
 ********************                             FINAL PARAMETER ESTIMATE                           ********************

 THETA - VECTOR OF FIXED EFFECTS PARAMETERS   *********
         TH 1      TH 2      TH 3      TH 4      TH 5      TH 6      TH 7
         2.02E+00  2.16E+00  2.79E+00  2.70E-02  2.10E+00  1.00E-03  9.93E-01

 OMEGA - COV MATRIX FOR RANDOM EFFECTS - ETAS  ********
         ETA1      ETA2      ETA3      ETA4      ETA5
 ETA1
+        0.00E+00
 ETA2
+        0.00E+00  1.60E-05
 ETA3
+        0.00E+00  4.35E-03  1.18E+00
 ETA4
+        0.00E+00  0.00E+00  0.00E+00  0.00E+00
 ETA5
+        0.00E+00  0.00E+00  0.00E+00  0.00E+00  0.00E+00

 SIGMA - COV MATRIX FOR RANDOM EFFECTS - EPSILONS  ****
         EPS1
 EPS1
+        1.00E+00

 OMEGA - CORR MATRIX FOR RANDOM EFFECTS - ETAS  *******
         ETA1      ETA2      ETA3      ETA4      ETA5
 ETA1
+        0.00E+00
 ETA2
+        0.00E+00  4.00E-03
 ETA3
+        0.00E+00  1.00E+00  1.09E+00
 ETA4
+        0.00E+00  0.00E+00  0.00E+00  0.00E+00
 ETA5
+        0.00E+00  0.00E+00  0.00E+00  0.00E+00  0.00E+00

 SIGMA - CORR MATRIX FOR RANDOM EFFECTS - EPSILONS  ***
         EPS1
 EPS1
+        1.00E+00
 Elapsed finaloutput time in seconds:     0.01
 #CPUT: Total CPU Time in Seconds,        0.719
