Wed Jan  5 08:28:36 UTC 2022
$PROBLEM TWO COMPARTMENT ORAL
$DATA pk_oral2_30_90.csv IGNORE=#
$INPUT ID TIME AMT DV MDV
$SUBROUTINE ADVAN4 TRANS4

$PK
  CL    = THETA(1)*EXP(ETA(1)) ;CL/F
  V2    = THETA(2)*EXP(ETA(2)) ;V2/F
  Q     = THETA(3)*EXP(ETA(3)) ;Q/F
  V3    = THETA(4)*EXP(ETA(4)) ;V3/F
  KA    = THETA(5)*EXP(ETA(5)) ;Absorption rate constant
  ALAG1 = THETA(6)*EXP(ETA(6)) ;Lag time

$ERROR
  IPRED   = F
  W       = SQRT(THETA(7)**2 + THETA(8)**2 * IPRED**2); additive plus proportional error model
  IRES    = DV - IPRED
  IWRES   = IRES / W
  Y       = IPRED + W * EPS(1)

$THETA
  (0,100);CL
  (0,700);V2
  (0,70) ;Q
  (0,500);V3
  (0,10) ;KA
  (0,1)  ;ALAG1
  10
  0.2

$OMEGA
;  .25 ;CL
;  .25 ;V2
;  .25 ;Q
;  .25 ;V3
  0 FIX ;CL
  0 FIX ;V2
  0 FIX ;Q
  0 FIX ;V3
  0 FIX ;KA
  0 FIX ;ALAG1

$SIGMA
  1 FIX ;ERRCV

$ESTIMATION METHOD=0 POSTHOC MAXEVAL=9999 PRINT=5
;$ESTIMATION NOABORT MAXEVAL=9999 METHOD=1 INTER PRINT=10 SIGDIGITS=3

$COVARIANCE PRINT=E

$TABLE ID TIME IPRED IWRES DV NOPRINT ONEHEADER FILE=sdtab4403
$TABLE ID CL V2 Q V3 KA ALAG1 NOPRINT ONEHEADER NOAPPEND FILE=patab4403

NM-TRAN MESSAGES
 WARNINGS AND ERRORS (IF ANY) FOR PROBLEM    1
 (WARNING  2) NM-TRAN INFERS THAT THE DATA ARE POPULATION.
 (WARNING  23) $PK DOES NOT DEFINE A SCALE PARAMETER FOR THE CENTRAL
 COMPARTMENT.  WITH THIS TRANS, IT MAY NOT BE POSSIBLE TO SEPARATELY
 OBTAIN ESTIMATES OF PARAMETERS AFFECTING CLEARANCE AND VOLUME.

1NONLINEAR MIXED EFFECTS MODEL PROGRAM (NONMEM) VERSION 7.5.0
 ORIGINALLY DEVELOPED BY STUART BEAL, LEWIS SHEINER, AND ALISON BOECKMANN
 CURRENT DEVELOPERS ARE ROBERT BAUER, ICON DEVELOPMENT SOLUTIONS,
 AND ALISON BOECKMANN. IMPLEMENTATION, EFFICIENCY, AND STANDARDIZATION
 PERFORMED BY NOUS INFOSYSTEMS.
 PROBLEM NO.:         1
 TWO COMPARTMENT ORAL
 TOT. NO. OF OBS RECS:       49
 TOT. NO. OF INDIVIDUALS:        6
 TWO COMPARTMENT MODEL WITH FIRST-ORDER ABSORPTION (ADVAN4)
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 #TBLN:      1
 #METH: First Order
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
0PRED EXIT CODE = 1
0INDIVIDUAL NO.       1   ID= 1.00000000000000E+00   (WITHIN-INDIVIDUAL) DATA REC NO.   3
 THETA=
  1.31+109   9.34+134   7.00E-01   5.00E+00   Infinity   1.00E-02   9.95E+01   1.19E-01
 A ROOT OF THE CHARACTERISTIC EQUATION IS ZERO BECAUSE
 K*K32 IS MUCH SMALLER THAN  (K+K23+K32)**2.
 PERHAPS K OR K32 IS VERY SMALL, OR K23 IS VERY LARGE.
0PROGRAM TERMINATED BY OBJ
 MESSAGE ISSUED FROM ESTIMATION STEP

 #TERM:

 TOTAL DATA POINTS NORMALLY DISTRIBUTED (N):            0
 N*LOG(2PI) CONSTANT TO OBJECTIVE FUNCTION:    0.0000000000000000
 OBJECTIVE FUNCTION VALUE WITHOUT CONSTANT:    149145.44014260225
 OBJECTIVE FUNCTION VALUE WITH CONSTANT:       149145.44014260225
 REPORTED OBJECTIVE FUNCTION DOES NOT CONTAIN CONSTANT

 TOTAL EFFECTIVE ETAS (NIND*NETA):                             0


 #TERE:
 Elapsed estimation  time in seconds:     0.03
 #CPUT: Total CPU Time in Seconds,        0.037
