Wed Jan  5 05:54:05 UTC 2022
$PROBLEM TWO COMPARTMENT ORAL

$DATA pk_oral2_full_dos.csv IGNORE=#

$INPUT ID TIME AMT DV MDV CMT DOS

$SUBROUTINE ADVAN5

$MODEL
  COMP(DEPOT, DEFDOSE)
  COMP(CENT, DEFOBS)
  COMP(PERI)

$PK
  CL = THETA(1) * EXP(ETA(1))
  V2 = THETA(2) * EXP(ETA(2))
  V3 = THETA(3) * EXP(ETA(3))
  Q = THETA(4) * EXP(ETA(4))
  KA = THETA(5) * EXP(ETA(5))
  F1 = THETA(6) + THETA(7) * LOG(DOS)

  K12 = KA
  K20 = CL/V2
  K23 = Q/V2
  K32 = Q/V3

$ERROR
  IPRED = F
  W = SQRT(THETA(8)**2 + THETA(9)**2 * IPRED**2)
  IRES = DV - IPRED
  IWRES = IRES / W
  Y = IPRED + W * EPS(1)

$THETA
  (0,100) ; CL
  (0,700) ; V2
  (0,70) ; Q
  (0,500) ; V3
  (0,1) ;POPKA
  0.5 ;FINT
  (0, 0.1) ; FD
  10
  .5

$OMEGA
  .25 ;BSVCL/F
  .25 ;BSVV/F
  .25 ;BSVV3/F
  0 FIX ;BSVQ/F
  .25 ;BSVKA

$SIGMA
  1 FIX ;ERRCV

$ESTIMATION METHOD=0 POSTHOC MAXEVAL=9999 PRINT=5

$COVARIANCE PRINT=E

$TABLE ID TIME IPRED IWRES DV NOPRINT ONEHEADER FILE=sdtab4404
$TABLE ID CL V2 Q V3 KA F1 NOPRINT ONEHEADER NOAPPEND FILE=patab4404

NM-TRAN MESSAGES
 WARNINGS AND ERRORS (IF ANY) FOR PROBLEM    1
 (WARNING  2) NM-TRAN INFERS THAT THE DATA ARE POPULATION.

1NONLINEAR MIXED EFFECTS MODEL PROGRAM (NONMEM) VERSION 7.5.0
 ORIGINALLY DEVELOPED BY STUART BEAL, LEWIS SHEINER, AND ALISON BOECKMANN
 CURRENT DEVELOPERS ARE ROBERT BAUER, ICON DEVELOPMENT SOLUTIONS,
 AND ALISON BOECKMANN. IMPLEMENTATION, EFFICIENCY, AND STANDARDIZATION
 PERFORMED BY NOUS INFOSYSTEMS.
 PROBLEM NO.:         1
 TWO COMPARTMENT ORAL
 TOT. NO. OF OBS RECS:       76
 TOT. NO. OF INDIVIDUALS:        9
 GENERAL LINEAR KINETICS MODEL (ADVAN5)
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 #TBLN:      1
 #METH: First Order
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
 #TERM:
0MINIMIZATION SUCCESSFUL
 NO. OF FUNCTION EVALUATIONS USED:     1647
 NO. OF SIG. DIGITS IN FINAL EST.:  3.4
0PARAMETER ESTIMATE IS NEAR ITS BOUNDARY
 THIS MUST BE ADDRESSED BEFORE THE COVARIANCE STEP CAN BE IMPLEMENTED

 TOTAL DATA POINTS NORMALLY DISTRIBUTED (N):           76
 N*LOG(2PI) CONSTANT TO OBJECTIVE FUNCTION:    139.67865704711025
 OBJECTIVE FUNCTION VALUE WITHOUT CONSTANT:    1315.4653905702437
 OBJECTIVE FUNCTION VALUE WITH CONSTANT:       1455.1440476173539
 REPORTED OBJECTIVE FUNCTION DOES NOT CONTAIN CONSTANT

 TOTAL EFFECTIVE ETAS (NIND*NETA):                            36


 #TERE:
 Elapsed estimation  time in seconds:     2.81
 Elapsed postprocess time in seconds:     0.05

 ********************                                   FIRST ORDER                                  ********************
 #OBJT:**************                       MINIMUM VALUE OF OBJECTIVE FUNCTION                      ********************
 #OBJV:********************************************     1315.465       **************************************************

 ********************                                   FIRST ORDER                                  ********************
 ********************                             FINAL PARAMETER ESTIMATE                           ********************

 THETA - VECTOR OF FIXED EFFECTS PARAMETERS   *********
         TH 1      TH 2      TH 3      TH 4      TH 5      TH 6      TH 7      TH 8      TH 9
         9.01E+01  2.13E+01  1.08E+02  3.80E+12  2.19E+00  3.76E+00  1.00E-03 -1.10E+01  1.26E+00

 OMEGA - COV MATRIX FOR RANDOM EFFECTS - ETAS  ********
         ETA1      ETA2      ETA3      ETA4      ETA5
 ETA1
+        2.50E-05
 ETA2
+        0.00E+00  2.50E-05
 ETA3
+        0.00E+00  0.00E+00  6.99E-02
 ETA4
+        0.00E+00  0.00E+00  0.00E+00  0.00E+00
 ETA5
+        0.00E+00  0.00E+00  0.00E+00  0.00E+00  2.50E-05

 SIGMA - COV MATRIX FOR RANDOM EFFECTS - EPSILONS  ****
         EPS1
 EPS1
+        1.00E+00

 OMEGA - CORR MATRIX FOR RANDOM EFFECTS - ETAS  *******
         ETA1      ETA2      ETA3      ETA4      ETA5
 ETA1
+        5.00E-03
 ETA2
+        0.00E+00  5.00E-03
 ETA3
+        0.00E+00  0.00E+00  2.64E-01
 ETA4
+        0.00E+00  0.00E+00  0.00E+00  0.00E+00
 ETA5
+        0.00E+00  0.00E+00  0.00E+00  0.00E+00  5.00E-03

 SIGMA - CORR MATRIX FOR RANDOM EFFECTS - EPSILONS  ***
         EPS1
 EPS1
+        1.00E+00
 Elapsed finaloutput time in seconds:     0.01
 #CPUT: Total CPU Time in Seconds,        2.878
