$PROBLEM TWO COMPARTMENT ORAL

$DATA pk_oral2_full_dos.csv IGNORE=#

$INPUT ID TIME AMT DV MDV CMT DOS

$SUBROUTINE ADVAN5

$MODEL
  COMP(DEPOT, DEFDOSE)
  COMP(CENT, DEFOBS)
  COMP(PERI)

$PK
  CL = THETA(1) * EXP(ETA(1))
  V2 = THETA(2) * EXP(ETA(2))
  V3 = THETA(3) * EXP(ETA(3))
  Q = THETA(4) * EXP(ETA(4))
  KA = THETA(5) * EXP(ETA(5))
  F1 = THETA(6) + THETA(7) * LOG(DOS)

  K12 = KA
  K20 = CL/V2
  K23 = Q/V2
  K32 = Q/V3

$ERROR
  IPRED = F
  W = SQRT(THETA(8)**2 + THETA(9)**2 * IPRED**2)
  IRES = DV - IPRED
  IWRES = IRES / W
  Y = IPRED + W * EPS(1)

$THETA
  (0,100) ; CL
  (0,700) ; V2
  (0,70) ; Q
  (0,500) ; V3
  (0,1) ;POPKA
  (0, 0.5, 1) ;FINT
  (0, 0.1) ; FD
  10
  .5

$OMEGA
  .25 ;BSVCL/F
  .25 ;BSVV/F
  .25 ;BSVV3/F
  0 FIX ;BSVQ/F
  .25 ;BSVKA

$SIGMA
  1 FIX ;ERRCV

$ESTIMATION METHOD=0 POSTHOC MAXEVAL=9999 PRINT=5

$COVARIANCE PRINT=E

$TABLE ID TIME IPRED IWRES DV NOPRINT ONEHEADER FILE=sdtab4404
$TABLE ID CL V2 Q V3 KA F1 NOPRINT ONEHEADER NOAPPEND FILE=patab4404
